// SBML level 3 version 1

model growth_update(Cell, Glcxt, Ac, O2, X, rateOfV1, rateOfV3, rateOfV4, rateOfV2, X_out, mu)

  // Compartments:
  compartment Cell = 1;

  // Species:
  substanceOnly species Glcxt in Cell = 0;
  substanceOnly species O2 in Cell = 0;
  substanceOnly species Ac in Cell = 0;
  substanceOnly species X in Cell = 0;
  substanceOnly species X_out in Cell = 0;

  // Parameters:
  rateOfV1 = 0;
  rateOfV3 = 0;
  rateOfV2 = 0;
  rateOfV4 = 0;
  mu = 0;

  // Reactions:
  v2: 9.46 Glcxt + 12.92 O2 => X; rateOfV2*X;
  v4: 19.23 Glcxt => 12.12 Ac + X; rateOfV4*X;
  v1: 39.43 Ac + 35 O2 => X; rateOfV1*X;
  v3: 9.84 Glcxt + 12.73 O2 => 1.24 Ac + X; rateOfV3*X;
  r0: X => X_out; mu;
end
